OpenVSP model (file version 5), 11 components.
Geometry view with OpenVSP parameter names; values to 6 digits, angles in degrees, lengths in the model's unit.
Overall bounding box: X_Min=-0.955286 X_Len=2.38905 Y_Min=-1.69088 Y_Len=3.38177 Z_Min=-0.199651 Z_Len=0.758982

Fuselage "main_fuselage"
  location (X Y Z) -0.509365 0 -0.0998257, rotation 0 0 0
  bounding box size 0.76533 0.199651 0.199651
  Design: Length=0.76533
  cross sections:
    n  XLocPercent  YLocPercent  ZLocPercent  shape
    0  0            0            0            edit curve Width=0.139756 Height=0.139756 AbsoluteFlag=0 SymType=1 linear points (X Y): 0.5 0, 0.5 -0.5, 0 -0.5, -0.5 -0.5, -0.5 0, -0.5 0.5, 0 0.5, 0.5 0.5, 0.5 0
    1  0.136364     0            0            edit curve Width=0.199651 Height=0.199651 AbsoluteFlag=0 SymType=1 linear points (X Y): 0.5 0, 0.5 -0.5, 0 -0.5, -0.5 -0.5, -0.5 0, -0.5 0.5, 0 0.5, 0.5 0.5, 0.5 0
    2  0.863636     0            0            as above
    3  1            0            0            edit curve Width=0.0798605 Height=0.0798605 AbsoluteFlag=0 SymType=1 linear points (X Y): 0.5 0, 0.5 -0.5, 0 -0.5, -0.5 -0.5, -0.5 0, -0.5 0.5, 0 0.5, 0.5 0.5, 0.5 0

Fuselage "right_motor_boom"
  location (X Y Z) -0.606324 0.504674 0, rotation 0 0 0
  bounding box size 2.04009 0.0199651 0.0199651
  Design: Length=2.04009
  cross sections:
    n  XLocPercent  YLocPercent  ZLocPercent  shape
    0  0            0            0            edit curve Width=0.0199651 Height=0.0199651 AbsoluteFlag=0 SymType=1 linear points (X Y): 0.5 0, 0.5 -0.5, 0 -0.5, -0.5 -0.5, -0.5 0, -0.5 0.5, 0 0.5, 0.5 0.5, 0.5 0
    1  0.5          0            0            as above
    2  1            0            0            as above

Fuselage "left_motor_boom"
  location (X Y Z) -0.606324 -0.504674 0, rotation 0 0 0
  bounding box size 2.04009 0.0199651 0.0199651
  Design: Length=2.04009
  cross sections:
    n  XLocPercent  YLocPercent  ZLocPercent  shape
    0  0            0            0            edit curve Width=0.0199651 Height=0.0199651 AbsoluteFlag=0 SymType=1 linear points (X Y): 0.5 0, 0.5 -0.5, 0 -0.5, -0.5 -0.5, -0.5 0, -0.5 0.5, 0 0.5, 0.5 0.5, 0.5 0
    1  0.5          0            0            as above
    2  1            0            0            as above

Wing "Main_Wing"
  location (X Y Z) 0 0 0, rotation 0 2 0
  symmetric about XZ
  bounding box size 0.471498 3.38177 0.0708141
  totals: TotalSpan=3.38177 TotalProjectedSpan=3.38177 TotalChord=0.422731 TotalArea=1.42958 TotalAR=7.99981 MAC=0.424471
  root: chord 0.469701, twist 0, NACA 4-series Camber=0.06 CamberLoc=0.4 ThickChord=0.09
  sections:
    n  Span     Root_Chord  Tip_Chord  Area      Sweep  Sweep_Location  Dihedral  Twist  Twist_Location  tip airfoil
    1  1.69088  0.469701    0.375761   0.714789  1      0               0         0      0.25            as above
  SS_Control "SS_CONT_0": EtaStart=0.6 EtaEnd=0.9 Length_C_Start=0.25 Length_C_End=0.25 Length_Start=0.103334 Length_End=0.0962887 LE_Flag=0 Surf_Type=2

Wing "H_Stab"
  location (X Y Z) 1.21528 0 0.546221, rotation 0 0 0
  symmetric about XZ
  bounding box size 0.126218 1.00935 0.0146257
  totals: TotalSpan=1.00935 TotalProjectedSpan=1.00935 TotalChord=0.126168 TotalArea=0.127348 TotalAR=8 MAC=0.126168
  root: chord 0.126168, twist 0, NACA 4-series Camber=0.06 CamberLoc=0.4 ThickChord=0.09
  sections:
    n  Span      Root_Chord  Tip_Chord  Area       Sweep  Sweep_Location  Dihedral  Twist  Twist_Location  tip airfoil
    1  0.504674  0.126168    0.126168   0.0636739  0      0               0         0      0.25            as above
  SS_Control "SS_CONT_0": EtaStart=0 EtaEnd=0.7 Length_C_Start=0.3 Length_C_End=0.3 Length_Start=0.0378505 Length_End=0.0378505 LE_Flag=0 Surf_Type=2

Wing "V_Stab"
  location (X Y Z) 1.21528 0.504674 0, rotation 90 0 0
  symmetric about XZ
  bounding box size 0.154495 1.0279 0.386236
  totals: TotalSpan=0.772473 TotalProjectedSpan=0.772473 TotalChord=0.154495 TotalArea=0.119343 TotalAR=5 MAC=0.154495
  root: chord 0.154495, twist 0, NACA 4-series Camber=0 CamberLoc=0.1 ThickChord=0.12
  sections:
    n  Span      Root_Chord  Tip_Chord  Area       Sweep  Sweep_Location  Dihedral  Twist  Twist_Location  tip airfoil
    1  0.386236  0.154495    0.154495   0.0596714  0      0               0         0      0.25            as above
  SS_Control "SS_CONT_0": EtaStart=0.1 EtaEnd=0.9 Length_C_Start=0.3 Length_C_End=0.3 Length_Start=0.0463484 Length_End=0.0463484 LE_Flag=0 Surf_Type=2

Propeller "hover_FR_prop"
  location (X Y Z) -0.586324 0.504674 0.04, rotation 45 0 90
  bounding box size 0.737925 0.07645 0.07645
  Design: Diameter=0.736598 NumBlade=2 Beta34=20 UseBeta34Flag=1 Feather=0 Rotate=0 Precone=0 ReverseFlag=0 FoldAngle=0 PropMode=0 AF=151.538 CLi=0.538798 Chord=0.177656 Solidity=0.113099 ConstructXoC=0.5 FeatherAxisXoC=0.5 FeatherOffsetXoC=0
  cross sections:
    n  RadiusFrac  shape
    0  0.2         ellipse Ellipse_Height=0.014732 Ellipse_Width=0.0294639
    1  0.4         NACA 16-series Chord=0.0612297 IdealCl=0.7 ThickChord=0.144074
    2  1           NACA 16-series Chord=0.0478789 IdealCl=0.2 ThickChord=0.03
  Chord along r/R (cubic Bezier): 0.2: 0.08, 0.333333: 0.15, 0.466667: 0.2, 0.6: 0.2, 0.716667: 0.2, 0.833333: 0.2, 0.95: 0.2, 0.966667: 0.2, 0.983333: 0.2, 1: 0.13
  Twist along r/R (PCHIP): 0.2: 46.75, 0.75: 20, 1: 13
  Thick along r/R (cubic Bezier): 0.2: 0.5, 0.233333: 0.3, 0.266667: 0.225, 0.3: 0.2, 0.4: 0.125, 0.5: 0.115, 0.6: 0.1, 0.733333: 0.075, 0.866667: 0.055, 1: 0.03
  CLI along r/R (cubic Bezier): 0.2: 0, 0.266667: 0.7, 0.333333: 0.7, 0.4: 0.7, 0.466667: 0.7, 0.533333: 0.7, 0.6: 0.7, 0.733333: 0.7, 0.866667: 0.7, 1: 0.2

Propeller "hover_FL_prop"
  location (X Y Z) -0.586324 -0.504674 0.04, rotation 45 0 90
  bounding box size 0.737925 0.07645 0.07645
  Design: Diameter=0.736598 NumBlade=2 Beta34=20 UseBeta34Flag=1 Feather=0 Rotate=0 Precone=0 ReverseFlag=0 FoldAngle=0 PropMode=0 AF=151.538 CLi=0.538798 Chord=0.177656 Solidity=0.113099 ConstructXoC=0.5 FeatherAxisXoC=0.5 FeatherOffsetXoC=0
  cross sections:
    n  RadiusFrac  shape
    0  0.2         ellipse Ellipse_Height=0.014732 Ellipse_Width=0.0294639
    1  0.4         NACA 16-series Chord=0.0612297 IdealCl=0.7 ThickChord=0.144074
    2  1           NACA 16-series Chord=0.0478789 IdealCl=0.2 ThickChord=0.03
  blade curves as in "hover_FR_prop"

Propeller "hover_BR_prop"
  location (X Y Z) 0.82698 0.504674 0.04, rotation 45 0 90
  bounding box size 0.737925 0.07645 0.07645
  Design: Diameter=0.736598 NumBlade=2 Beta34=20 UseBeta34Flag=1 Feather=0 Rotate=0 Precone=0 ReverseFlag=0 FoldAngle=0 PropMode=0 AF=151.538 CLi=0.538798 Chord=0.177656 Solidity=0.113099 ConstructXoC=0.5 FeatherAxisXoC=0.5 FeatherOffsetXoC=0
  cross sections:
    n  RadiusFrac  shape
    0  0.2         ellipse Ellipse_Height=0.014732 Ellipse_Width=0.0294639
    1  0.4         NACA 16-series Chord=0.0612297 IdealCl=0.7 ThickChord=0.144074
    2  1           NACA 16-series Chord=0.0478789 IdealCl=0.2 ThickChord=0.03
  blade curves as in "hover_FR_prop"

Propeller "hover_BL_prop"
  location (X Y Z) 0.82698 -0.504674 0.04, rotation 45 0 90
  bounding box size 0.737925 0.07645 0.07645
  Design: Diameter=0.736598 NumBlade=2 Beta34=20 UseBeta34Flag=1 Feather=0 Rotate=0 Precone=0 ReverseFlag=0 FoldAngle=0 PropMode=0 AF=151.538 CLi=0.538798 Chord=0.177656 Solidity=0.113099 ConstructXoC=0.5 FeatherAxisXoC=0.5 FeatherOffsetXoC=0
  cross sections:
    n  RadiusFrac  shape
    0  0.2         ellipse Ellipse_Height=0.014732 Ellipse_Width=0.0294639
    1  0.4         NACA 16-series Chord=0.0612297 IdealCl=0.7 ThickChord=0.144074
    2  1           NACA 16-series Chord=0.0478789 IdealCl=0.2 ThickChord=0.03
  blade curves as in "hover_FR_prop"

Propeller "cruise_prop"
  location (X Y Z) 0.295966 0 -0.0998257, rotation 0 0 0
  bounding box size 0.0115669 0.233169 0.0225956
  Design: Diameter=0.232749 NumBlade=2 Beta34=20 UseBeta34Flag=1 Feather=0 Rotate=0 Precone=0 ReverseFlag=0 FoldAngle=0 PropMode=0 AF=151.538 CLi=0.538798 Chord=0.177656 Solidity=0.113099 ConstructXoC=0.5 FeatherAxisXoC=0.5 FeatherOffsetXoC=0
  cross sections:
    n  RadiusFrac  shape
    0  0.2         ellipse Ellipse_Height=0.00465499 Ellipse_Width=0.00930997
    1  0.4         NACA 16-series Chord=0.0193473 IdealCl=0.7 ThickChord=0.144074
    2  1           NACA 16-series Chord=0.0151287 IdealCl=0.2 ThickChord=0.03
  blade curves as in "hover_FR_prop"
